<?xml version="1.0"?>
<Lems>
    <Target component="sim1"/>

    <Include file="ex2dims.xml"/>
    <Include file="spikegenerators.xml"/>
    <Include file="misciaf.xml"/>

    <Component id="gen1" type="spikeGenerator" period="30ms"/>
    <Component id="gen2" type="spikeGenerator2" period="32ms"/>
    <Component id="iaf3cpt" type="iaf3" leakReversal="-50mV" deltaV="50mV" threshold="-30mV" leakConductance="50pS" refractoryPeriod="4ms" capacitance="1pF"/>

    <ComponentType name="Network">
        <Children name="populations" type="Population"/>
        <Children name="connectivities" type="EventConnectivity"/>
    </ComponentType>

    <ComponentType name="Population">
        <ComponentReference name="component" type="Component"/>
        <Parameter name="size" dimension="none"/>
        <Structure>
            <MultiInstantiate number="size" component="component"/>
        </Structure>
    </ComponentType>

    <ComponentType name="EventConnectivity">
        <Link name="source" type="Population"/>
        <Link name="target" type="Population"/>
        <Child name="Connections" type="ConnectionPattern"/>
    </ComponentType>

    <ComponentType name="ConnectionPattern"/>

    <ComponentType name="AllAll" extends="ConnectionPattern">
        <Structure>
            <ForEach instances="../source" as="a">
                <ForEach instances="../target" as="b">
                    <EventConnection from="a" to="b"/>
                </ForEach>
            </ForEach>
        </Structure>
    </ComponentType>

    <Network id="net1">
        <Population id="p1" component="gen1" size="2"/>
        <Population id="p3" component="iaf3cpt" size="3"/>
        <EventConnectivity id="p1-p3" source="p1" target="p3">
            <Connections type="AllAll"/>
        </EventConnectivity>
    </Network>

    <Include file="SingleSimulation.xml"/>

    <Simulation id="sim1" length="80ms" step="0.05ms" target="net1">
        <Display id="d0" title="Example 7: User defined types for networks and populations" timeScale="1ms" xmin="-10" xmax="90" ymin="-50" ymax="90">
            <Line id="gen_v" quantity="p3[0]/v" scale="1mV" timeScale="1ms" color="#0000f0"/>
            <Line id="gen_tsince" quantity="p1[0]/tsince" scale="1ms" timeScale="1ms" color="#00c000"/>
        </Display>
    </Simulation>
</Lems>
